<Lems xmlns="http://www.neuroml.org/lems/0.7.3"
      xmlns:xsi="http://www.w3.org/2001/XMLSchema-instance"
      xsi:schemaLocation="http://www.neuroml.org/lems/0.7.3 LEMS_v0.7.3.xsd">

    <ComponentType name="PituitaryGH3Lactotroph">

    <Parameter name="v" dimension="none"/>
    <Parameter name="c" dimension="none"/>
    <Parameter name="n" dimension="none"/>
    <Parameter name="cer" dimension="none"/>
    <Parameter name="a" dimension="none"/>
    <Parameter name="nIR" dimension="none"/>
    <Parameter name="rIR" dimension="none"/>

</ComponentType>

</Lems>
